# Определяем функцию:
f(x) := x*sin(sqrt(x))
# Определяем функцию:
f(y) := y*sin(sqrt(y))
# Вычисление значение функции:
f(1) = 0.841471
# Вычисление значение функции:
f(1) = 0.841471
# Формируем вектор значений x с шагом 1:
x := 1 .. 5
# Формируем вектор значений x с шагом 0.2
# :
y := 0, 0.2 .. 4*π
# Выводим значение
# аргумента
# Выводим значение функции
# Выводим значение
# аргумента
# Выводим значение функции
x = [1; 2; 3; 4; 5]
f(x) = [0.841471; 1.97553; 2.96108; 3.63719; 3.93375]
y = [
    0; 0.2; 0.4; 0.6; 0.8; 1; 1.2; 1.4; 1.6; 1.8
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]
f(y) = [
    0; 0.086491; 0.236451; 0.419657; 0.623881; 0.841471; 1.06696; 1.29616; 1.52573; 1.75295
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]
