f(x) := x*sin(sqrt(|x|))
x := 1 .. 5
x = [1; 2; 3; 4; 5]
f(x) = [0.841471; 1.97553; 2.96108; 3.63719; 3.93375]
f(1) = 0.841471
x := 0, 0.2 .. 4*π
x = [
    0; 0.2; 0.4; 0.6; 0.8; 1; 1.2; 1.4; 1.6; 1.8
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]
f(x) = [
    0; 0.086491; 0.236451; 0.419657; 0.623881; 0.841471; 1.06696; 1.29616; 1.52573; 1.75295
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]
