f(x) := sin(x)
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x0 := -5
x1 := 5
y0 := -5
y1 := 5
f(x, y) := cos(0.2*x*y)
c := CreateMesh(f, x0, x1, y0, y1, 50)
# [component: inputs c]
# [component: inputs f]
# Вариант 13
x := 1, 1.1 .. 10
g(x) := cos(3*x)^2
f(x) := x^3 + x^2
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x := 0, 0.1 .. 0.5
y := 0, 0.2 .. 1
f(x, y) := tan(x - sqrt(|cos(x) - e^y|))^2
# [component: inputs f]
# [component: inputs f]
c := CreateMesh(f, x0, x1, y0, y1, 50)
# [component: inputs c]
