f(x) := sin(x)
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g(x, y) := cos(0.2*x*y)
# [component: inputs g]
# [component: inputs g]
# Зададим функцию двух переменных
k(x, y) := cos(0.2*x*y)
# Зададим пределы изменения переменных
x0 := -5
x1 := 5
y0 := -5
y1 := 5
# Используя мастер функции, выберем категорию
# Векторы И Матрицы И активизируем CreateMesh
c := CreateMesh(k, x0, x1, y0, y1, 50)
# Построим поверхностный график
# [component: inputs c]
# Ввод переменных:
b := 5
# Определяем функции:
fin1(x) := x/sin(x)
gin1(x) := 1/2^x
# Определяем функцию:
fin2(x, y) := (b - sqrt(sin(x*y)^2))
# [component: inputs fin2]
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